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(i)
V := (a + c)*h/2*H
V == k/2*H simplify → H*h*(c + a)/2 == H*k/2
# Richtig
H*h*(c + a)/2 == H*k/2 solve, k → (c + a)*h
(II)
V == H/n → H*h*(c + a)/2 == H/n
# Falsch
H*h*(c + a)/2 == H/n solve, n → 2/((c + a)*h)
clear(V)
(III)
H*h*(c + a)/2 == V solve, a, simplify → -c + 2*V/(H*h)
a(c) := -c  # Richtig
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# 2) falsch
clear(a, x, C)
f(x) := C*a^x  # 3) richtig aufpassen mit 0 aber
# 4) stimmt
f'(x) := d/dx(f(x)) → C*ln(a)*a^x  # 5) falsch
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(A)
# Ist direkt proportional
# x wird größer und somit T größer
(C)
stimmt
(E)
# Ist indirekt proportional
# wenn T größer wird ist z kleiner
# (B) | stimmt | (D) | Stimmt
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clear(a, t)
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P(t) := 300000/(300 + 700*e^(-0.2*t))
(a)
P(t) == 900 solve, t → 15.2226121886  # nach 15.22 jahren erreicht man eine population von 900 tieren
# [plot: P(t) vs t]
(b)
P(t) == 1000 solve, t → 294.468969105
# Nach 294 jahren ist eine population von 1000 tieren erreichbar
P'(t) := d/dx(P(t))
(c)
a := 0.2
N(t) := 300000/(300 + 700*e^(a*t))
# ist die zahl positiv dann fällt das wachstum. Ist die zahl negativ dann steigt das wachstum.
#
# um so größer die zahl im interval -∞ < x < 0 um so langsamer ist das wachstum
#
# um so kleiner die zahl im intervall
# 0>x>∞ um so langsamer nimmt die population ab.
# [plot: N(t) vs t]
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x^2 == 2*x - 1
g(x) := 2*x - 1
f(x) := x^2
# [plot: f(x), g(x) vs x]
# (1)
# L={1}
#
# (2)
# in genau einem Punkt berurt (Tangente)
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a
k := 0.14
Np := 24300
clear(t)
# t in jahren und W(t) der preis nach t jahren
W(t) := Np*(1 - k)^t
b
W(t) == 24200/2 solve, t → 4.62311058335
# [plot: W(t) vs t]
# Nach 4.623 jahren ist der PKW nur halb soviel wert
(c)
Np - W(1) → 3402.0
# Der wertverlust für ein neuwertiges auto beträgt 3402.0 euro
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# falsch
# Falsch
# Falsch
Richtig
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(A)
a1 := 20
a2 := 40
sa1(t) := 1/2*a1*t^2
sa2(t) := 1/2*a2*t^2
(B)
sa3(t) := 1/2*a1*(t - 2)^2  # t>=2
# Der weg der zurückgelegt wird ist doppelt so weit
# [plot: sa1(t), sa2(t), sa3(t) vs t]
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clear(t)
A(t) := 15*e^(0.39*t)
(a)
A(0) → 15.0
# es wurden am anfang 15 bakterien in die nährlösung gegeben
(b)
A(8) → 339.695694648
# Es befinden sich 339.69 milchsäurebakterien in der nährlösung
(c)
A(t) == 15*4 solve, t → 3.55460092595  # (D)
39%
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clear(k, t)
T0 := 4
Tr := 28
T(t) := Tr - (Tr - T0)*e^(-k*t) → -(24*e^(-(k*t))) + 28
T(2) == 8 → -(24*e^(-(2*k))) + 28 == 8 solve, k → -ln(5/6)/2
T(t) := K*(1 - C*a^t)
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(A)
t := 2
a := 0.1
# Falsche aussage laut probe
a^t → 0.01
(B)
t := -0.1
a := 2  # Ist falsch laut probe
a^t → 0.933032991537
clear(t)
(C)
a := -4
N0 := 2
N(t) := N0*a^t  # falsch a muss im bereich 0 <t<1 sein
(D)
# falsch bei a = -1 ist sie konstant
(E)
# richtig
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(1)
# richtig
(4)
# richtig da man für jedes mal ziehen eine möglichkeit rausnimmt und somit die wahrscheinlickeit sinkt/steigt
# (2) | richtig
# (3) | falsch | (5) | falsch es bleibt konstant
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0.95*0.9 → 0.855
# Die wahrscheinlichkeit für einen transport ohne schäden beträgt 0.855
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X := [17; 20; 21; 22; 24]
Y := [2; 3; 3; 1; 4]
stdev(X, Y) = 9.27416
mean(X, Y) = 11.7
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# richtig
richtig
richtig
falsch
falsch
# falsch median
# ist bei 25
100/6 = 16.6667  # es habe 16.67% aller gummibärchen die farbe rot
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0.75*0.75 + 0.75*0.25*0.65 + 0.25*0.65*0.65 → 0.79
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X := [82; 91; 88; 73; 85; 77; 81; 89; 75; 79; 80; 71]
α := 0.01
μx := mean(X) = 80.9167
σx := 3.8
n := 12
length(X) → 12
μx - qnorm(1 - α/2, 0, 1)*σx/sqrt(n) = 78.0911
μx + qnorm(1 - α/2, 0, 1)*σx/sqrt(n) = 83.7423
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P''(x)
(a)
# standartabweichung ist 0.05
# erwartungswert ist 1.5
(C)
σ := 0.65
μ := 80
pnorm(79, 80, 0.65) = 0.0619679
pnorm(81, 80, 0.65) - pnorm(79.5, 80, 0.65) = 0.717154
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praucher := 0.288
pglücklich := 0.4
n := 1500
α := 0.05
μ := n*pglücklich → 600.0
σ := sqrt(n*pglücklich*(1 - pglücklich)) = 18.9737
qnorm(α/2, μ, σ) = 562.812
qnorm(1 - α/2, μ, σ) = 637.188
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n := 20
züge := 5
gelbeKugeln := 10
10/20 → 1/2  # Hoch 5 weil 5 mal gezogen wird
# Es representiert die chance das 3 von 5 kugeln die gleiche varbe haben bei 5 zügen
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clear(a, d)
f(x) := a*x + d
[f(0) == 250; f(5) == 0] solve, a, d → [-50, 250]
f(x) := -50*x + 250
f2(x) := -100*x + 250
# [plot: f(x), f2(x) vs x]
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(a)
# t ist indriekt proportional zu z um so größer z um so kleiner T
falsch
y := 5
(b)
2*y^2 → 50
y^2 → 25  # richtig
# (c) | richtig
# (D) | richtig
# (E) | falsch ist direkt proportional
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0.5*0.02 + 0.3*0.03 + 0.05*0.2 → 0.029
P(M1 and (not M2) and (not M3))
50%*2%/(50%*2% + 30%*3% + 20%*5%) → 10/29
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# (a) | Österreich hat kapp 9 millionen einwohner
(b)
pnorm(3, 10, 0.37) = 3.9836e-80
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μ := 600
α := 0.15
μ2 := 700
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X := [10.42; 11.86; 8.9; 10.28; 9.86; 11.31; 8.57; 9.42; 11.31; 8.36]
α := 0.01
μx := mean(X) = 10.029
σx := Stdev(X) = 1.22196
n := 10
μx - qt(1 - α/2, n - 1)*σx/sqrt(n) = 8.77321
μx + qt(1 - α/2, n - 1)*σx/sqrt(n) = 11.2848
# Es liegt im intervall [8.78|1.22]
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α := 0.05
μx := 150
σx := 50
n := 20
μx - qt(1 - α/2, n - 1)*σx/sqrt(n) = 126.599
μx + qt(1 - α/2, n - 1)*σx/sqrt(n) = 173.401
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μ1 := 21.9
α1 := 0.05
pnorm(x, 21.9, σ) == 0.05
μ2 := 22.2
α2 := 0.01
pnorm(x, 22.2, σ) == 0.01
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σ := 1.5
pnorm(63, 60, σ) - pnorm(57, 60, σ) = 0.9545
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μ := 30
σ := 0.05
(A)
pnorm(30.1, 30, 0.05) - pnorm(30, 30, 0.05) = 0.47725
(B)
pnorm(29.9, 30, 0.05) = 0.0227501
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X := [10.42; 11.86; 8.9; 10.28; 9.96; 11.31; 8.57; 9.42; 11.31; 8.36]
α := 0.01
μx := mean(X) = 10.039
σx := Stdev(X) = 1.22083
n := 10
μx - qt(1 - α/2, n - 1)*σx/sqrt(n) = 8.78436
μx + qt(1 - α/2, n - 1)*σx/sqrt(n) = 11.2936
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μ := 6320
n := 50
# Nr b ist richtig
σ := 250
α := 0.9
μ - qt(1 - α/2, n - 1)*σ/sqrt(n) = 6315.53
μ + qt(1 - α/2, n - 1)*σ/sqrt(n) = 6324.47
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f(x) := 1/24*(x^4 - 18*x^2 + 81)
f'(x) := d/dx(f(x)) → (x^3 - 9*x)/6
# [plot: f(x) vs x]
f(x) == 0 solve, x → [3; 3; -3; -3]
f(3) → 0
f(-3) → 0
f'(x) == 0 solve, x → [0; 3; -3]
H := f(0) → 27/8 = 3.375
H/2 = 1.6875
f''(x) := d/dx(f'(x)) → (x^2 - 3)/2
H/2 == f(x) solve, x → [-3.91968889463; -1.62358830044; 1.62358830044; 3.91968889463]
f''(x) == 0 solve, x → [sqrt(3); -sqrt(3)]
B := 2*1.62358830044 = 3.24718
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4.6 - 1.8 → 2.8
q1 := 0.8*100/2.8 → 28.5714285714
2.6 - 1.8 → 0.8
q2 := 2*100/2.8 → 71.4285714286
3.8 - 1.8 → 2.0
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clear(a)
(B)
x := sqrt(a^2 + s^2 - 2*a*s*cos(α + 90*deg))
a := 73
s := 150
α := 48 deg
x := sqrt(a^2 + s^2 - 2*a*s*cos(α + 90 deg)) = 210.009
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c := 0.6
d := 0.8
h := 1
h2 := 0.8
b := sin(65*deg) == h2/hyp solve, hyp → 0.8/sin(65.0*deg) = 0.882702
γ := 360 deg - 90 deg*2 - 115 deg → 65*deg
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clear(a, t, λ)
f(t, a, λ) := a*e^(λ*t)
X := [1; 2; 3; 4; 5]
Y := [13; 24; 39; 68; 117]
genfit(X, Y, [1; 1], f) = [7.78908; 0.541789]
f(t) := 7.77*e^(0.54*t)
f(6) → 198.397017977  # Zum zeitpunkt 6 h sind es 198.39 bakterien
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# (A) | Die maximal geschwindigkeit ist 90 km/h | (C)
(B)
f(x) := a*x + d
s(t) := -1/3*t^3 + 2*t^2 + 1/3*t
[f(1) == 15; f(3) == 25] solve, a, d →  # error: Falsche Auflösungsvariable.
s(0) assume, 0 ≤ t ≤ 3 → 0
f(x) := 5*x + 10
s(t) == 0 assume, 0 ≤ t ≤ 3; solve, t → 0
s'(t) := d/dt(s(t))
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K(x) := a*x^3 + b*x^2 + c*x + d
K'(x) := d/dx(K(x)) → 3.0*a*x^2 + 1.76540467034*x + 0.6
K'(x) := d^2/dx^2(K(x)) → 6.0*a*x + 1.76540467034
C(x) := K(x)/x → (a*x^3 + 0.88270233517*x^2 + 0.6*x + 0.8)/x
C'(x) := d/dx(C(x)) → 2.0*a*x + (0.88270233517 - 1.0*0.8/x^2)
K'(10)
K'(10) == 0
K(25) == 22500
C'(25) == 0
[K(10) == 250; C'(25) == 0; K'(10) == 0; K(25) == 22500] solve, a, b, c, d → =  # error
K(x) := -1.296*x^3 + 38.889*x^2 + 1386.111*x - 16203.704
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richtig
# falsch Zuerst steigen dann fallen
falsch
falsch
richtig
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K(x) := 0.2*x^2 + 8*x + 280 - 500/(x + 4)
n(x) := 220 - 4*x
E(x) := n(x)*x → x*(-(4*x) + 220)
G(x) := E(x) - K(x) → 500.0/(x + 4.0) + (x*(220.0 - 4.0*x) - (0.2*x^2 + 8.0*x + 280.0))
G'(x) := d/dx(G(x))
G'(x) == 0 solve, x →  # error
(C)
n(25.168) = 119.328
# Courntotsche puntk liegt bei C(25.168|119.328)
(D)
n(x) := 220 - 4*x
clera(x)
η(x) := -n(x)/(x*(d/dx(n(x))))
η(25.168) → 1.18531468531  # > 1 somit handelt es sich um eine elastische nachfrage
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A1 := integral(f(x), x = -2 .. 0)
A3 := integral(f(x), x = 2 .. 3)
A2 := |integral(f(x), x = 0 .. 2)|
clear(x)
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f(x) := -0.00108*x^3 + 0.046*x^2 - 0.4367*x + 3
# [plot: f(x) vs x]
f'(x) := d/dx(f(x))
f''(x) := d^2/dx^2(f(x))
f'(x) == 0 solve, x → [6.0252648368; 22.3697968916]
f(x) == 0 solve, x → [32.8597997174; 4.86639643758 + 7.80079566423i; 4.86639643758 - 7.80079566423i]
(A)
d := 2*f(6.03) = 3.60501
(B)
integral(f(x), x = 2 .. 32.86) → 86.8162525631  # cm^3
86.81425/1000 → 0.08681425
clear(b)
(C)
integral(f(x), x = b .. 32.86) == 800 solve, b → [-27.3189932521; 12.5408382992 - 38.3236259633i; 12.5408382992 + 38.3236259633i; 59.0274401105] = [-27.319; 12.5408 - 38.3236i; 12.5408 + 38.3236i; 59.0274]
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W(t) := 1/10*t^2
# [plot: W(t) vs t]
integral(W(t), t = 0 .. 10) = 33.3333  # Die pfanze ist nach 10 tagen 33.33 cm größer
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f(x) := 85/5 - 116/1125*x^2
# [plot: f(x) vs x]
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|2500 - 4500| → 2000
σ := 1000
μ := 2500 + 1000 → 3500
f(x) := 1/nthroot(2*π, σ)*e^(-1/2*((x - μ)/σ)^2)
# [plot: f(x), pnorm(x, μ, σ) vs x]
1 - pnorm(4000, 3500, 1000) = 0.308538
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H(t) := 6 + 1.8*cos(0.507*t)
H'(x) := d/dx(H(x)) → -0.9126*sin(0.507*x)
# [plot: H(t) vs t]
(a)
# 6 ist der mittelwert um den die funtion schwanked
(b)
H'(t) == 0 solve, t → 0.0
# es werden die hochpunkte der wassertiefe in relation zur zeit berechent
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b4(v) := a*v^2 + b*v + c
b4'(v) := d/dv(b4(v)) → 2.0*a*v + b
[b4'(40) == 0; b4(40) == 3.9; b4(100) == 6] solve, a, b, c →  # error
a := 4.83
b := -0.05
c := 4.83
b4(v) := 4.83*v^2 - 0.05*v + 4.83
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A := 10
b := π/180
c := 13
f(t) := A*sin(b*t - 2*π/3) + c
f'(t) := d/dt(f(t))
f'(t) == 0 solve, t → 30
f(210) → 23
# [plot: f(t) vs t]
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μ := 3
σ := 0.25
α := 0.1
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clear(x)
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h(x) := (e^(-0.181*x^2) - 0.915)
3*integral(e^(-0.181*x^2) - 0.915, x = -0.7 .. 0.7) → 0.236069107787
# [plot: h(x) vs x]
# Es wird der flächeninhalt der funtion h(x) im bereich -0.7 bis 0.7
# berechnet und verdreifacht
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f(x) := 1/(0.1*x + 0.35) - 0.85
f(x) == 0 solve, x → 8.26470588235
π*integral(f(x)^2, x = 0 .. 8.264) → 17.0678979488
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a
clear(a, d)
f(x, a, d) := a*x + d
X := [3; 4; 5; 6; 9.5; 11; 17]
Y := [130; 250; 280; 350; 600; 800; 100]
[a; d] := genfit(X, Y, [1; 1], f) = [8.13385; 294.082]
b
f(x) := a*x + d → 8.13385442112*x + 294.081582805
# [plot: f(x), Y vs x, X]
c
f(15) → 416.089399122
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α := 2.46 deg
GK := 3007 - 800 → 2207
β1 := 14.26 deg
β2 := 17.23 deg
λ1 := 90*deg - β1 → 75.74*deg
λ2 := 90*deg - β2 → 72.77*deg
λ := λ2 + λ1 → 148.51*deg
γ := 180*deg - λ - α → 29.03*deg
sin(β2) == GK/HYP solve, HYP → 2207.0/sin(17.23*deg) = 7450.84
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clear(t, a)
# [plot: p(t) vs t]
p(t) := 0.0066*t^2 - 1.1134*t + 36.2106
p'(t) := d/dt(p(t)) → 0.0132*t - 1.1134
p'(t) == 0 assume, 0 ≤ t ≤ 120; solve, t → 84.3484848485
# Der pegelstand der donau nimmt an stärksten zum zeitpunkt 84.34 h an
p2(t) := 0.0022*t^3 - 0.5567*t^2 + 36.2106*t + 700
p2'(t) := d/dt(p2(t)) → 0.0066*t^2 - 1.1134*t + 36.2106
# [plot: p2'(t), p(t) vs t]
# Ja sie kann eine stammfuntion sein wie rechnerisch gezeigt wurde
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(A)
clear(x, d, k)
y(x) := -1/20*x^2
y'(x) := d/dx(y(x)) → -x/10
y'(x) == 0.1 solve, x → -1.0
y(-1) → -1/20
P := [-1; -1/20]
k := 0.1
(B)
d := -1/20 == -1*k + d solve, d → 0.05
t(x) := k*x + d → 0.1*x + 0.05
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(C)
y(-20) - t(-20) = -18.05
y(15) - t(15) → -12.8
(D)
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clear(a, t, λ)
f(t, a, λ) := a*e^(λ*t)
X := [1; 2; 3; 4; 5]
Y := [13; 24; 39; 68; 119]
genfit(X, Y, [1; 1], f) = [7.58347; 0.55022]
f(t) := 7.58*e^(0.55*t)
f(6) → 205.513803019  # Zum zeitpunkt 6 h sind es 205.51 bakterien
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h(x) := (e^(-0.181*x^2) - 0.915)
3*integral(e^(-0.181*x^2) - 0.915, x = -0.7 .. 0.7) → 0.236069107787
# [plot: h(x) vs x]
# Es wird der flächeninhalt der funtion h(x) im bereich -0.7 bis 0.7
# berechnet und verdreifacht
